t0 := 1
A := 7
T := 5
u0(x) :=
    A/T*x - t0 if t0 ≤ x < t0 + T
    A*x/(-2*T) + A*(t0 + 3*T)/(2*T) if t0 + T ≤ x < t0 + 3*T
    (0*x) if x < t0
    (0*x) if x > t0 + 3*T
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N := 100
n := 0 .. N
X[n] := 10*T*n/N
Y := rnorm(N + 1, 0, 1)
u := pspline(X, Y)
Un(t) := interp(u, X, Y, t)
Us(t) := u0(t) + Un(t)
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sp(ω) := (1/sqrt(2*π))*integral(u0(x)*e^(-1i*ω*x), x = 0 .. 10*T)
s(ω) := |sp(ω)|
F := □  # error: This placeholder is empty.
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φ(ω) := atan(Im(sp(ω))/Re(sp(ω)))
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